// SBML level 3 version 2

model body()
  // model units - substance: millimole, time: hour, extent: millimole

  // Compartments:
  compartment plasma = 1 litre;

  // Species:
  species G_plasma in plasma = 5;
  species I_eff in plasma = 0;
  species G_abs in plasma = 0;
  species Pyr_abs in plasma = 0;
  species Pyr_plasma in plasma = 0;
  species AA_plasma in plasma = 0;
  species Ketone_plasma in plasma = 0;
  species Succ_plasma in plasma = 0;

  // Parameters:
  ptt_hgp_factor = 1 dimensionless;
  glucose_mgdl_scale = 18.0182 dimensionless;
  I_eff_ref = 1 millimole_per_litre;
  k_export_glucose = 0.02 per_hour;
  k_hgp_base = 0.35 millimole_per_litre_per_hour;
  V_hgp_pyr = 0.05 millimole_per_litre_per_hour;
  K_pyr_hgp = 0.5 millimole_per_litre;
  V_hgp_aa = 0.02 millimole_per_litre_per_hour;
  K_aa_hgp = 1 millimole_per_litre;
  k_clear_base = 0.07 per_hour;
  k_clear_ins = 0.2 per_hour;
  k_I_decay = 2 per_hour;
  k_g_abs = 8 per_hour;
  k_pyr_abs = 4 per_hour;
  k_pyr_uptake = 0.03 per_hour;
  k_pyr_clear = 0.2 per_hour;
  k_AA_release_fasting = 0.02 millimole_per_litre_per_hour;
  k_AA_liver_uptake = 0.1 per_hour;
  k_ketogenesis = 0.03 per_hour;
  k_ketone_clearance = 0.1 per_hour;
  fasting_ketone_factor = 1 dimensionless;
  k_succ_appearance = 0.005 millimole_per_litre_per_hour;
  k_succ_clear = 0.2 per_hour;
  G_mgdl has millimole_per_litre;

  // Assignment rules:
  G_mgdl := glucose_mgdl_scale*G_plasma;

  // Reactions:
  source_G_plasma_hgp: => G_plasma; (k_hgp_base + V_hgp_pyr*ptt_hgp_factor*Pyr_plasma/(K_pyr_hgp + Pyr_plasma) + V_hgp_aa*AA_plasma/(K_aa_hgp + AA_plasma))*plasma;  // modifiers: Pyr_plasma, AA_plasma
  absorb_G_abs_to_G_plasma: G_abs => G_plasma; k_g_abs*G_abs*plasma;
  absorb_Pyr_abs_to_Pyr_plasma: Pyr_abs => Pyr_plasma; k_pyr_abs*Pyr_abs*plasma;
  clear_G_plasma: G_plasma => ; (k_clear_base + k_clear_ins*(I_eff/I_eff_ref))*G_plasma*plasma;  // modifiers: I_eff
  decay_I_eff: I_eff => ; k_I_decay*I_eff*plasma;
  source_Pyr_plasma: => Pyr_plasma; k_pyr_uptake*G_plasma*plasma;  // modifiers: G_plasma
  clear_Pyr_plasma: Pyr_plasma => ; k_pyr_clear*Pyr_plasma*plasma;
  source_AA_plasma: => AA_plasma; k_AA_release_fasting*plasma;
  clear_AA_plasma: AA_plasma => ; k_AA_liver_uptake*AA_plasma*plasma;
  ketogenesis_from_AA: AA_plasma => Ketone_plasma; k_ketogenesis*fasting_ketone_factor*AA_plasma*plasma;
  clear_Ketone_plasma: Ketone_plasma => ; k_ketone_clearance*Ketone_plasma*plasma;
  source_Succ_plasma: => Succ_plasma; k_succ_appearance*plasma;
  clear_Succ_plasma: Succ_plasma => ; k_succ_clear*Succ_plasma*plasma;

  // Unit definitions:
  unit millimole = 1e-3 mole;
  unit hour = 3600 second;
  unit per_hour = 1 / (3600 second);
  unit millimole_per_litre = 1e-3 mole / litre;
  unit millimole_per_litre_per_hour = 1e-3 mole / (litre * 3600 second);
end
