// SBML level 3 version 2

model body_liver()
  // model units - substance: millimole, time: hour, extent: millimole

  // Compartments:
  compartment plasma = 1 litre;
  compartment hepatocyte_cytosol = 1 litre;
  compartment mitochondrion = 0.3 litre;
  compartment extracellular_medium = 1 litre;

  // Species:
  species G_plasma in plasma = 5;
  species I_eff in plasma = 0;
  species G_abs in plasma = 0;
  species Pyr_abs in plasma = 0;
  species Pyr_plasma in plasma = 0;
  species AA_plasma in plasma = 0;
  species Ketone_plasma in plasma = 0;
  species Succ_plasma in plasma = 0;
  species G6P_liver in hepatocyte_cytosol = 1;
  species Glycogen_liver in hepatocyte_cytosol = 100;
  species Pyr_liver in hepatocyte_cytosol = 0.1;
  species Succ_mito in mitochondrion = 0.1;
  species Succ_extra in extracellular_medium = 0;
  species Mito_capacity in mitochondrion = 1;

  // Parameters:
  ptt_hgp_factor = 1 dimensionless;
  glucose_mgdl_scale = 18.0182 dimensionless;
  I_eff_ref = 1 millimole_per_litre;
  k_export_glucose = 0.02 per_hour;
  k_hgp_base = 0.35 millimole_per_litre_per_hour;
  V_hgp_pyr = 0.05 millimole_per_litre_per_hour;
  K_pyr_hgp = 0.5 millimole_per_litre;
  V_hgp_aa = 0.02 millimole_per_litre_per_hour;
  K_aa_hgp = 1 millimole_per_litre;
  k_clear_base = 0.07 per_hour;
  k_clear_ins = 0.2 per_hour;
  k_I_decay = 2 per_hour;
  k_g_abs = 8 per_hour;
  k_pyr_abs = 4 per_hour;
  k_pyr_uptake = 0.03 per_hour;
  k_pyr_clear = 0.2 per_hour;
  k_AA_release_fasting = 0.02 millimole_per_litre_per_hour;
  k_AA_liver_uptake = 0.1 per_hour;
  k_ketogenesis = 0.03 per_hour;
  k_ketone_clearance = 0.1 per_hour;
  k_succ_appearance = 0.005 millimole_per_litre_per_hour;
  k_succ_clear = 0.2 per_hour;
  G_mgdl has millimole_per_litre;
  Mito_capacity_ref = 1 millimole_per_litre;
  k_glucose_uptake = 0.05 per_hour;
  k_glycogen_synthesis = 0.03 per_hour;
  k_glycogenolysis = 0.03 per_hour;
  k_gng_pyr = 0.03 per_hour;
  k_gng_aa = 0.03 per_hour;
  k_glycolysis = 0.05 per_hour;
  k_TCA_glucose = 0.05 per_hour;
  k_gln_anaplerosis = 0.02 millimole_per_litre_per_hour;
  k_lactate_export = 0.08 per_hour;
  k_succ_export = 0.1 per_hour;
  k_mito_adapt = 0.1 per_hour;
  mito_target = 0.3 millimole_per_litre;
  mito_sucnr1_gain = 1 dimensionless;
  mito_sucnr1_baseline = 1 dimensionless;
  K_sucnr1 = 0.03 millimole_per_litre;
  genotype_sucnr1 = 1 dimensionless;
  ligand_factor = 1 dimensionless;
  antagonist_factor = 1 dimensionless;
  ocr_scale = 300 dimensionless;
  ecar_scale = 20 dimensionless;
  mito_ocr_scale = 500 dimensionless;
  SUCNR1_activity has dimensionless;
  OCR_proxy has millimole_per_litre;
  ECAR_proxy has millimole_per_litre;
  mito_OCR_proxy has millimole_per_litre;

  // Assignment rules:
  G_mgdl := glucose_mgdl_scale*G_plasma;
  SUCNR1_activity := genotype_sucnr1*ligand_factor*antagonist_factor;
  OCR_proxy := ocr_scale*Mito_capacity;
  ECAR_proxy := ecar_scale*Pyr_liver;
  mito_OCR_proxy := mito_ocr_scale*Mito_capacity;

  // Reactions:
  source_G_plasma_hgp: => G_plasma; (k_hgp_base + V_hgp_pyr*ptt_hgp_factor*Pyr_plasma/(K_pyr_hgp + Pyr_plasma) + V_hgp_aa*AA_plasma/(K_aa_hgp + AA_plasma))*plasma;  // modifiers: Pyr_plasma, AA_plasma
  absorb_G_abs_to_G_plasma: G_abs => G_plasma; k_g_abs*G_abs*plasma;
  absorb_Pyr_abs_to_Pyr_plasma: Pyr_abs => Pyr_plasma; k_pyr_abs*Pyr_abs*plasma;
  clear_G_plasma: G_plasma => ; (k_clear_base + k_clear_ins*(I_eff/I_eff_ref))*G_plasma*plasma;  // modifiers: I_eff
  decay_I_eff: I_eff => ; k_I_decay*I_eff*plasma;
  source_Pyr_plasma: => Pyr_plasma; k_pyr_uptake*G_plasma*plasma;  // modifiers: G_plasma
  clear_Pyr_plasma: Pyr_plasma => ; k_pyr_clear*Pyr_plasma*plasma;
  source_AA_plasma: => AA_plasma; k_AA_release_fasting*plasma;
  clear_AA_plasma: AA_plasma => ; k_AA_liver_uptake*AA_plasma*plasma;
  ketogenesis_from_AA: AA_plasma => Ketone_plasma; k_ketogenesis*AA_plasma*plasma;
  clear_Ketone_plasma: Ketone_plasma => ; k_ketone_clearance*Ketone_plasma*plasma;
  source_Succ_plasma: => Succ_plasma; k_succ_appearance*plasma;
  clear_Succ_plasma: Succ_plasma => ; k_succ_clear*Succ_plasma*plasma;
  glycogenolysis_to_G6P: Glycogen_liver => G6P_liver; k_glycogenolysis*Glycogen_liver*hepatocyte_cytosol;
  glycogen_synthesis_from_G6P: G6P_liver => Glycogen_liver; k_glycogen_synthesis*G6P_liver*hepatocyte_cytosol;
  glycolysis_G6P_to_Pyr: G6P_liver => Pyr_liver; k_glycolysis*G6P_liver*hepatocyte_cytosol;
  gng_Pyr_to_G6P: Pyr_liver => G6P_liver; k_gng_pyr*Pyr_liver*hepatocyte_cytosol;
  gln_anaplerosis_to_Succ_mito: => Succ_mito; k_gln_anaplerosis*mitochondrion;
  TCA_Pyr_to_Succ_mito: Pyr_liver => Succ_mito; k_TCA_glucose*(Mito_capacity/Mito_capacity_ref)*Pyr_liver*hepatocyte_cytosol;  // modifiers: Mito_capacity
  export_Succ_mito_to_extra: Succ_mito => Succ_extra; k_succ_export*Succ_mito*mitochondrion;
  clear_Succ_extra: Succ_extra => ; k_succ_clear*Succ_extra*extracellular_medium;
  produce_Mito_capacity: => Mito_capacity; k_mito_adapt*mito_target*(mito_sucnr1_baseline + mito_sucnr1_gain*SUCNR1_activity)*mitochondrion;
  decay_Mito_capacity: Mito_capacity => ; k_mito_adapt*Mito_capacity*mitochondrion;
  couple_G_plasma_to_G6P_liver: G_plasma => G6P_liver; k_glucose_uptake*G_plasma*plasma;
  couple_G6P_liver_to_G_plasma: G6P_liver => G_plasma; k_export_glucose*G6P_liver*hepatocyte_cytosol;
  couple_Succ_extra_to_Succ_plasma: Succ_extra => Succ_plasma; k_succ_export*Succ_extra*extracellular_medium;

  // Unit definitions:
  unit millimole = 1e-3 mole;
  unit hour = 3600 second;
  unit per_hour = 1 / (3600 second);
  unit millimole_per_litre = 1e-3 mole / litre;
  unit millimole_per_litre_per_hour = 1e-3 mole / (litre * 3600 second);
end
